<?xml version="1.0"?>
<!-- Generated by Aero-Matic v 0.8

     Inputs:
                horsepower: 160
                     pitch: fixed
            max engine rpm: 2450
        prop diameter (ft): 7.4 ft

     Outputs:
              max prop rpm:2450
                gear ratio:   1.0
                       Cp0:0.033614
                       Ct0:0.028908
       static thrust (lbs): 242.01
-->

<propeller name="rotol_88_34">
  <ixx>1.987 </ixx>
  <diameter unit="IN"> 80.0 </diameter>
  <numblades> 2 </numblades>
  <minpitch> 22 </minpitch>
  <maxpitch> 22 </maxpitch>
  <gearratio>1.0 </gearratio>

  <table name="C_THRUST" type="internal">
     <tableData>
       0.0  0.0859
       0.1  0.0903
       0.2  0.0858
       0.3  0.0774
       0.4  0.0697
       0.5  0.0613
       0.6  0.0546
       0.7  0.0479
       0.8  0.0364
       0.9  0.0234
       1.0  0.00262
       1.2  -0.004
       1.4  -0.0085
     </tableData>
  </table>


  <table name="C_POWER" type="internal">
     <tableData>
       0.0  0.0536
       0.1  0.0546
       0.2  0.0528
       0.3  0.04970
       0.4  0.0453
       0.5  0.0427
       0.6  0.0404
       0.7  0.0363
       0.8  0.0304
       1.0  0.0192
       1.2  0.0099
       1.4  -0.00019
       1.6  -0.0508
     </tableData>
  </table>

</propeller>
