<?xml version="1.0"?>
<?xml-stylesheet type="text/xsl" href="http://jsbsim.sourceforge.net/JSBSim.xsl"?>
<fdm_config name="Cygnet_II" version="2.0" release="ALPHA"
   xmlns:xsi="http://www.w3.org/2001/XMLSchema-instance"
   xsi:noNamespaceSchemaLocation="http://jsbsim.sourceforge.net/JSBSim.xsd">

 <fileheader>
  <author> Aeromatic v 0.95 </author>
  <filecreationdate> 2012-05-16 </filecreationdate>
  <version>$Revision: 1.10 $</version>
  <description> Models a Cygnet_II. </description>
 </fileheader>

<!--
  File:     Cygnet_II.xml
  Inputs:
    name:          Cygnet_II
    type:          light single
    max weight:    2200.0 lb
    wing span:     34.5 ft
    length:        22.0 ft
    wing area:     167 sq-ft
    gear type:     tricycle
    retractable?:  no
    # engines:     1
    engine type:   piston
    engine layout: forward fuselage
    yaw damper?    no

  Outputs:
    wing loading:  13.17 lb/sq-ft
    CL-alpha:      5 per radian
    CL-0:          0.25
    CL-max:        1.4
    CD-0:          0.028
    K:             0.04

-->

 <metrics>
   <wingarea  unit="FT2">  167.00 </wingarea>
   <wingspan  unit="FT" >   34.50 </wingspan>
   <wing_incidence>          2.00 </wing_incidence>
   <chord     unit="FT" >    4.72 </chord>
   <htailarea unit="FT2">   22.72 </htailarea>
   <htailarm  unit="FT" >   12.99 </htailarm>
   <vtailarea unit="FT2">   9.30 </vtailarea>
   <vtailarm  unit="FT" >   12.99 </vtailarm>
   <location name="AERORP" unit="M">
     <x>  0.103 </x>
     <y>   0.00 </y>
     <z>   -0.12 </z>
   </location>
   <location name="EYEPOINT" unit="M">
     <x>  0.0 </x>
     <y> 0.00 </y>
     <z>  0.00 </z>
   </location>
   <location name="VRP" unit="M">
     <x> 0.0 </x>
     <y> 0.0 </y>
     <z> 0.0 </z>
   </location>
 </metrics>

 <mass_balance>
   <ixx unit="SLUG*FT2">       809 </ixx>
   <iyy unit="SLUG*FT2">       693 </iyy>
   <izz unit="SLUG*FT2">      1443 </izz>
   <emptywt unit="LBS" >      1220 </emptywt>
   <location name="CG" unit="M">
     <x>  0.190 </x>
     <y>   0.00 </y>
     <z>   -0.023 </z>
   </location>
    <pointmass name="Pilot">
        <weight unit="LBS"> 170 </weight>
        <location unit="M">
            <x> 0.05 </x>
            <y> -0.265 </y>
            <z> -0.07 </z>
        </location>
    </pointmass>
    <pointmass name="Co-Pilot">
        <weight unit="LBS"> 0 </weight>
        <location unit="M">
            <x> 0.05 </x>
            <y> 0.265 </y>
            <z> -0.07 </z>
        </location>
    </pointmass>
    <pointmass name="Luggage">
        <!-- Max Luggage = 100 LBS -->
        <weight unit="LBS"> 29 </weight>
        <location unit="M">
            <x> 0.427 </x>
            <y> 0 </y>
            <z> 0 </z>
        </location>
   </pointmass>
 </mass_balance>

 <ground_reactions>

  <contact type="BOGEY" name="NOSE">
   <location unit="M">
     <x> -1.263 </x>
     <y>   0.00 </y>
     <z> -1.18 </z>
   </location>
   <static_friction>  0.80 </static_friction>
   <dynamic_friction> 0.50 </dynamic_friction>
   <rolling_friction> 0.006 </rolling_friction>
   <spring_coeff unit="LBS/FT">        2600.00 </spring_coeff>
   <damping_coeff unit="LBS/FT/SEC">    510.00 </damping_coeff>
   <max_steer unit="DEG"> 45.00 </max_steer>
   <brake_group>NONE</brake_group>
   <retractable>FIXED</retractable>
 </contact>

  <contact type="BOGEY" name="LEFT_MAIN">
   <location unit="M">
     <x>  0.282 </x>
     <y> -1.07 </y>
     <z> -1.237 </z>
   </location>
   <static_friction>  0.80 </static_friction>
   <dynamic_friction> 0.50 </dynamic_friction>
   <rolling_friction> 0.006 </rolling_friction>
   <spring_coeff unit="LBS/FT">       2900.00 </spring_coeff>
   <damping_coeff unit="LBS/FT/SEC">   800.00 </damping_coeff>
   <max_steer unit="DEG">0</max_steer>
   <brake_group>LEFT</brake_group>
   <retractable>FIXED</retractable>
 </contact>

  <contact type="BOGEY" name="RIGHT_MAIN">
   <location unit="M">
     <x>  0.282 </x>
     <y> 1.07 </y>
     <z> -1.237 </z>
   </location>
   <static_friction>  0.80 </static_friction>
   <dynamic_friction> 0.50 </dynamic_friction>
   <rolling_friction> 0.006 </rolling_friction>
   <spring_coeff unit="LBS/FT">       2900.00 </spring_coeff>
   <damping_coeff unit="LBS/FT/SEC">   800.00 </damping_coeff>
   <max_steer unit="DEG">0</max_steer>
   <brake_group>RIGHT</brake_group>
   <retractable>FIXED</retractable>
 </contact>

  <contact type="STRUCTURE" name="LEFT_WING">
    <location unit="IN">
     <x> 126.72 </x>
     <y> -17.25 </y>
     <z>  -6.60 </z>
    </location>
    <static_friction>  0.80 </static_friction>
    <dynamic_friction> 0.50 </dynamic_friction>
    <spring_coeff unit="LBS/FT">       2200.00 </spring_coeff>
    <damping_coeff unit="LBS/FT/SEC">   440.00 </damping_coeff>
 </contact>

  <contact type="STRUCTURE" name="RIGHT_WING">
    <location unit="IN">
     <x> 126.72 </x>
     <y>  17.25 </y>
     <z>  -6.60 </z>
    </location>
    <static_friction>  0.80 </static_friction>
    <dynamic_friction> 0.50 </dynamic_friction>
    <spring_coeff unit="LBS/FT">       2200.00 </spring_coeff>
    <damping_coeff unit="LBS/FT/SEC">   440.00 </damping_coeff>
 </contact>

 </ground_reactions>

 <propulsion>

   <engine file="cirrus_moth">
    <location unit="M">
      <x> -1.332 </x>
      <y>   0.00 </y>
      <z>   0.09 </z>
    </location>
    <orient unit="DEG">
      <pitch>  0.00 </pitch>
      <roll>   0.00 </roll>
      <yaw>    0.00 </yaw>
    </orient>
    <feed>0</feed>
    <feed>1</feed>
    <thruster file="rotol_88_34">
     <location unit="M">
       <x> -1.982 </x>
       <y>   0.00 </y>
       <z>   0.252 </z>
     </location>
     <orient unit="DEG">
       <pitch>  0.00 </pitch>
       <roll>   0.00 </roll>
       <yaw>    0.00</yaw>
     </orient>
     <sense> -1 </sense>
     <p_factor> 2 </p_factor>
    </thruster>
  </engine>

<!-- left wing fuel -->
  <tank type="FUEL" number="0">
     <location unit="M">
       <x>  -0.019 </x>
       <y> -0.71 </y>
       <z> -0.30 </z>
     </location>
     <capacity unit="LBS"> 160.00 </capacity>
     <contents unit="LBS">  124.00 </contents>
  </tank>
<!-- right wing fuel -->
  <tank type="FUEL" number="1">
     <location unit="M">
       <x>  -0.019 </x>
       <y> 0.71 </y>
       <z> -0.30 </z>
     </location>
     <capacity unit="LBS"> 160.00 </capacity>
     <contents unit="LBS">  124.00 </contents>
  </tank>

 </propulsion>


 <flight_control name="FCS: Cygnet_II">

<system file="alpha_buffet"/>
 <system file="crash-detect"/>
 <system file="particles"/>


  <channel name="Pitch">
   <summer name="Pitch Trim Sum">
      <input>fcs/elevator-cmd-norm</input>
      <input>fcs/pitch-trim-cmd-norm</input>
      <clipto>
        <min> -1 </min>
        <max>  1 </max>
      </clipto>
   </summer>

   <aerosurface_scale name="Elevator Control">
      <input>fcs/pitch-trim-sum</input>
      <range>
        <min> -0.35 </min>
        <max>  0.35 </max>
      </range>
      <output>fcs/elevator-pos-rad</output>
   </aerosurface_scale>

   <aerosurface_scale name="elevator normalization">
      <input>fcs/elevator-pos-rad</input>
      <domain>
        <min> -0.35 </min>
        <max>  0.35 </max>
      </domain>
      <range>
        <min> -1 </min>
        <max>  1 </max>
      </range>
      <output>fcs/elevator-pos-norm</output>
   </aerosurface_scale>

  </channel>

  <channel name="Roll">
   <summer name="Roll Trim Sum">
      <input>fcs/aileron-cmd-norm</input>
      <input>fcs/roll-trim-cmd-norm</input>
      <clipto>
        <min> -1 </min>
        <max>  1 </max>
      </clipto>
   </summer>

   <aerosurface_scale name="Left Aileron Control">
      <input>fcs/roll-trim-sum</input>
      <range>
        <min> -0.35 </min>
        <max>  0.35 </max>
      </range>
      <output>fcs/left-aileron-pos-rad</output>
   </aerosurface_scale>

   <aerosurface_scale name="Right Aileron Control">
      <input>fcs/roll-trim-sum</input>
      <range>
        <min> -0.35 </min>
        <max>  0.35 </max>
      </range>
      <output>fcs/right-aileron-pos-rad</output>
   </aerosurface_scale>

   <aerosurface_scale name="left aileron normalization">
      <input>fcs/left-aileron-pos-rad</input>
      <domain>
        <min> -0.35 </min>
        <max>  0.35 </max>
      </domain>
      <range>
        <min> -1 </min>
        <max>  1 </max>
      </range>
      <output>fcs/left-aileron-pos-norm</output>
   </aerosurface_scale>

   <aerosurface_scale name="right aileron normalization">
      <input>fcs/right-aileron-pos-rad</input>
      <domain>
        <min> -0.35 </min>
        <max>  0.35 </max>
      </domain>
      <range>
        <min> -1 </min>
        <max>  1 </max>
      </range>
      <output>fcs/right-aileron-pos-norm</output>
   </aerosurface_scale>

  </channel>

  <channel name="Yaw">
   <summer name="Rudder Command Sum">
      <input>fcs/rudder-cmd-norm</input>
      <input>fcs/yaw-trim-cmd-norm</input>
      <clipto>
        <min> -0.35 </min>
        <max>  0.35 </max>
      </clipto>
   </summer>

   <aerosurface_scale name="Rudder Control">
      <input>fcs/rudder-command-sum</input>
      <range>
        <min> -0.35 </min>
        <max>  0.35 </max>
      </range>
      <output>fcs/rudder-pos-rad</output>
   </aerosurface_scale>

   <aerosurface_scale name="rudder normalization">
      <input>fcs/rudder-pos-rad</input>
      <domain>
        <min> -0.35 </min>
        <max>  0.35 </max>
      </domain>
      <range>
        <min> -1 </min>
        <max>  1 </max>
      </range>
      <output>fcs/rudder-pos-norm</output>
   </aerosurface_scale>

  </channel>

  <channel name="Flaps">
   <kinematic name="Flaps Control">
     <input>fcs/flap-cmd-norm</input>
     <traverse>
       <setting>
          <position>  0 </position>
          <time>      0 </time>
       </setting>
       <setting>
          <position> 9 </position>
          <time>      4 </time>
       </setting>
       <setting>
          <position> 18 </position>
          <time>      4 </time>
       </setting>
       <setting>
          <position> 26 </position>
          <time>      4 </time>
       </setting>
        <setting>
          <position> 37 </position>
          <time>      4 </time>
       </setting>
     </traverse>
     <output>fcs/flap-pos-deg</output>
   </kinematic>

   <aerosurface_scale name="flap normalization">
      <input>fcs/flap-pos-deg</input>
      <domain>
        <min>  0 </min>
        <max> 37 </max>
      </domain>
      <range>
        <min> 0 </min>
        <max> 1 </max>
      </range>
      <output>fcs/flap-pos-norm</output>
   </aerosurface_scale>
  </channel>

        <channel name="Speedbrake">
            <kinematic name="Speedbrake Control">
                <input>fcs/speedbrake-cmd-norm</input>
                <traverse>
                    <setting>
                        <position> 0 </position>
                        <time> 0  </time>
                    </setting>
                    <setting>
                        <position> 1 </position>
                        <time> 4 </time>
                    </setting>
                </traverse>
                <output>fcs/speedbrake-pos-norm</output>
            </kinematic>

         </channel>

  <channel name="Landing Gear">
  </channel>

 </flight_control>

 <aerodynamics>

<alphalimits unit="DEG">
   <min>-6.0</min>
   <max>14.0</max>
  </alphalimits>

  <hysteresis_limits unit="DEG">
   <min> 13.0</min>
   <max>16.0</max>
  </hysteresis_limits>

  <function name="aero/function/ground-effect-factor-lift">
   <description>Change in lift due to ground effect factor</description>
   <product>
    <table>
     <independentVar lookup="row">aero/h_b-mac-ft</independentVar>
     <tableData>
        0.0  1.239
        0.1  1.179
        0.15 1.130
        0.2  1.083
        0.3  1.046
        0.4  1.055
        0.5  1.019
        0.6  1.013
        0.7  1.008
        0.8  1.006
        0.9  1.003
        1.0  1.002
        1.1  1.0
     </tableData>
    </table>
   </product>
  </function>

  <function name="aero/function/ground-effect-factor-drag">
   <description>Change in drag due to ground effect</description>
   <product>
    <table>
     <independentVar lookup="row">aero/h_b-mac-ft</independentVar>
     <tableData>
        0.0  0.580
        0.1  0.615
        0.15 0.649
        0.2  0.729
        0.3  0.775
        0.4  0.823
        0.5  0.898
        0.6  0.952
        0.7  0.980
        0.8  0.995
        0.9  1.0
        1.0  1.0
        1.1  1.0
     </tableData>
    </table>
   </product>
  </function>

  <axis name="LIFT">

    <function name="aero/force/Lift_alpha">
      <description>Lift due to alpha</description>
      <product>
          <property>aero/qbar-psf</property>
          <property>metrics/Sw-sqft</property>
          <table>
            <independentVar lookup="row">aero/alpha-rad</independentVar>
            <tableData>
              -0.2793        -1.098
              -0.1396        -0.48
              -0.1047        -0.224
              -0.0698        -0.104
              -0.0349        -0.0081
               0.000         0.180
               0.01745       0.235
               0.03491       0.350
               0.0523        0.474
               0.06981       0.681
               0.1047         0.855
               0.1396         0.991
               0.1745         1.16
               0.1918         1.29
               0.2443         1.335
               0.2793         1.409
               0.3142         1.308
               0.3316         1.214
               0.3491         1.091
               0.3665         0.837
               0.3840         0.6031
               0.436         0.4785
            </tableData>
          </table>
      </product>
    </function>

    <function name="aero/force/Lift_flap">
       <description>Delta Lift due to flaps</description>
       <product>
           <property>aero/qbar-psf</property>
           <property>metrics/Sw-sqft</property>
           <property>fcs/flap-pos-deg</property>
           <value> 0.023 </value>
       </product>
    </function>

    <function name="aero/force/Lift_speedbrake">
       <description>Delta Lift due to speedbrake</description>
       <product>
           <property>aero/qbar-psf</property>
           <property>metrics/Sw-sqft</property>
           <property>fcs/speedbrake-pos-norm</property>
           <value>-0.0019</value>
       </product>
    </function>

    <function name="aero/force/Lift_elevator">
       <description>Lift due to Elevator Deflection</description>
       <product>
           <property>aero/qbar-psf</property>
           <property>metrics/Sw-sqft</property>
           <property>fcs/elevator-pos-rad</property>
           <value>0.21</value>
       </product>
    </function>

  </axis>

  <axis name="DRAG">

    <function name="aero/force/Drag_basic">
       <description>Drag at zero lift</description>
       <product>
          <property>aero/qbar-psf</property>
          <property>metrics/Sw-sqft</property>
          <table>
            <independentVar lookup="row">aero/alpha-rad</independentVar>
            <tableData>
                        -1.5700	  1.500
                       -0.280         0.794
                       -0.140         0.401
                       -0.105         0.069
                       -0.070         0.041
                       -0.035         0.0208
                        0.000         0.0148
                        0.035         0.0131
                        0.087         0.0234
                        0.104         0.0359
                        0.157         0.0504
                        0.174         0.0649
                        0.209         0.0793
                        0.244         0.0996
                        0.279         0.1397
                        0.314         0.237
                        0.332         0.305
                        0.349         0.496
                        0.366         0.692
                        0.384         1.0910
                        0.419         1.294
                        1.570   	  1.5000
            </tableData>
          </table>
       </product>
    </function>

    <function name="aero/force/Drag_induced">
       <description>Induced drag</description>
         <product>
           <property>aero/qbar-psf</property>
           <property>metrics/Sw-sqft</property>
           <property>aero/cl-squared</property>
           <value>0.056</value>
         </product>
    </function>

    <function name="aero/force/Drag_mach">
       <description>Drag due to mach</description>
        <product>
          <property>aero/qbar-psf</property>
          <property>metrics/Sw-sqft</property>
          <table>
            <independentVar lookup="row">velocities/mach</independentVar>
            <tableData>
                0.00      0.000
                0.7      0.000
                1.10      0.023
                1.80      0.015
            </tableData>
          </table>
        </product>
    </function>

    <function name="aero/force/Drag_flap">
       <description>Drag due to flaps</description>
         <product>
           <property>aero/qbar-psf</property>
           <property>metrics/Sw-sqft</property>
           <property>fcs/flap-pos-deg</property>
           <value> 0.0018 </value>
         </product>
    </function>

    <function name="aero/force/Drag_speedbrake">
       <description>Drag due to speedbrakes</description>
         <product>
           <property>aero/qbar-psf</property>
           <property>metrics/Sw-sqft</property>
           <property>fcs/speedbrake-pos-norm</property>
           <value>0.017</value>
         </product>
    </function>

    <function name="aero/force/Drag_beta">
       <description>Drag due to sideslip</description>
       <product>
          <property>aero/qbar-psf</property>
          <property>metrics/Sw-sqft</property>
          <table>
            <independentVar lookup="row">aero/beta-rad</independentVar>
            <tableData>
              -1.57       1.20
              -0.26    0.0425
               0.00       0.000
               0.26    0.0425
               1.57       1.20
            </tableData>
          </table>
       </product>
    </function>

    <function name="aero/force/Drag_elevator">
       <description>Drag due to Elevator Deflection</description>
       <product>
           <property>aero/qbar-psf</property>
           <property>metrics/Sw-sqft</property>
           <abs><property>fcs/elevator-pos-norm</property></abs>
           <value>0.04</value>
       </product>
    </function>

  </axis>

  <axis name="SIDE">

    <function name="aero/force/Side_beta">
       <description>Side force due to beta</description>
       <product>
           <property>aero/qbar-psf</property>
           <property>metrics/Sw-sqft</property>
           <property>aero/beta-rad</property>
           <value>-1</value>
       </product>
    </function>

  </axis>

  <axis name="ROLL">

    <function name="aero/moment/Roll_beta">
       <description>Roll moment due to beta</description>
       <product>
           <property>aero/qbar-psf</property>
           <property>metrics/Sw-sqft</property>
           <property>metrics/bw-ft</property>
           <property>aero/beta-rad</property>
           <value>-0.18</value>
       </product>
    </function>

    <function name="aero/moment/Roll_damp">
       <description>Roll moment due to roll rate</description>
       <product>
           <property>aero/qbar-psf</property>
           <property>metrics/Sw-sqft</property>
           <property>metrics/bw-ft</property>
           <property>aero/bi2vel</property>
           <property>velocities/p-aero-rad_sec</property>
           <value>-0.4</value>
       </product>
    </function>

    <function name="aero/moment/Roll_yaw">
       <description>Roll moment due to yaw rate</description>
       <product>
           <property>aero/qbar-psf</property>
           <property>metrics/Sw-sqft</property>
           <property>metrics/bw-ft</property>
           <property>aero/bi2vel</property>
           <property>velocities/r-aero-rad_sec</property>
           <value>0.075</value>
       </product>
    </function>

    <function name="aero/moment/Roll_aileron">
       <description>Roll moment due to aileron</description>
       <product>
          <property>aero/qbar-psf</property>
          <property>metrics/Sw-sqft</property>
          <property>metrics/bw-ft</property>
          <property>fcs/left-aileron-pos-rad</property>
          <table>
            <independentVar lookup="row">velocities/mach</independentVar>
            <tableData>
              0.0    0.127
              2.0    0.047
            </tableData>
          </table>
       </product>
    </function>

    <function name="aero/moment/Roll_rudder">
       <description>Roll moment due to rudder</description>
       <product>
           <property>aero/qbar-psf</property>
           <property>metrics/Sw-sqft</property>
           <property>metrics/bw-ft</property>
           <property>fcs/rudder-pos-rad</property>
           <value>0.0071</value>
       </product>
    </function>

  </axis>

  <axis name="PITCH">

   <function name="aero/coefficient/Cmflap">
                <description>Pitch_moment_due_to_flaps</description>
                <product>
                    <property>aero/qbar-psf</property>
                    <property>metrics/Sw-sqft</property>
                    <property>metrics/cbarw-ft</property>
                    <property>fcs/flap-pos-norm</property>
                    <value>-0.0085</value>
                </product>
            </function>

<function name="aero/coefficient/Cmspeedbrake">
                <description>Pitch_moment_due_to_speedbrake</description>
                <product>
                    <property>aero/qbar-psf</property>
                    <property>metrics/Sw-sqft</property>
                    <property>metrics/cbarw-ft</property>
                    <property>fcs/speedbrake-pos-norm</property>
                    <value>0.0125</value>
                </product>
            </function>

    <function name="aero/moment/Pitch_alpha">
       <description>Pitch moment due to alpha</description>
       <product>
           <property>aero/qbar-psf</property>
           <property>metrics/Sw-sqft</property>
           <property>metrics/cbarw-ft</property>
           <property>aero/alpha-rad</property>
           <value>-0.8</value>
       </product>
    </function>

    <function name="aero/moment/Pitch_elevator">
       <description>Pitch moment due to elevator</description>
       <product>
          <property>aero/qbar-psf</property>
          <property>metrics/Sw-sqft</property>
          <property>metrics/cbarw-ft</property>
          <property>fcs/elevator-pos-rad</property>
          <table>
            <independentVar lookup="row">velocities/mach</independentVar>
            <tableData>
              0.0     -1.100
              2.0     -0.275
            </tableData>
          </table>
       </product>
    </function>

    <function name="aero/moment/Pitch_damp">
       <description>Pitch moment due to pitch rate</description>
       <product>
           <property>aero/qbar-psf</property>
           <property>metrics/Sw-sqft</property>
           <property>metrics/cbarw-ft</property>
           <property>aero/ci2vel</property>
           <property>velocities/q-aero-rad_sec</property>
           <value>-12</value>
       </product>
    </function>

    <function name="aero/moment/Pitch_alphadot">
       <description>Pitch moment due to alpha rate</description>
       <product>
           <property>aero/qbar-psf</property>
           <property>metrics/Sw-sqft</property>
           <property>metrics/cbarw-ft</property>
           <property>aero/ci2vel</property>
           <property>aero/alphadot-rad_sec</property>
           <value>-7</value>
       </product>
    </function>

  </axis>

  <axis name="YAW">

    <function name="aero/moment/Yaw_beta">
       <description>Yaw moment due to beta</description>
       <product>
           <property>aero/qbar-psf</property>
           <property>metrics/Sw-sqft</property>
           <property>metrics/bw-ft</property>
           <property>aero/beta-rad</property>
           <value>0.12</value>
       </product>
    </function>

    <function name="aero/moment/Yaw_damp">
       <description>Yaw moment due to yaw rate</description>
       <product>
           <property>aero/qbar-psf</property>
           <property>metrics/Sw-sqft</property>
           <property>metrics/bw-ft</property>
           <property>aero/bi2vel</property>
           <property>velocities/r-aero-rad_sec</property>
           <value>-0.11</value>
       </product>
    </function>

    <function name="aero/moment/Yaw_rudder">
       <description>Yaw moment due to rudder</description>
       <product>
           <property>aero/qbar-psf</property>
           <property>metrics/Sw-sqft</property>
           <property>metrics/bw-ft</property>
           <property>fcs/rudder-pos-rad</property>
           <value>-0.092</value>
       </product>
    </function>

    <function name="aero/moment/Yaw_aileron">
       <description>Adverse yaw</description>
       <product>
           <property>aero/qbar-psf</property>
           <property>metrics/Sw-sqft</property>
           <property>metrics/bw-ft</property>
           <property>fcs/left-aileron-pos-rad</property>
           <value>-0.031</value>
       </product>
    </function>

  </axis>

 </aerodynamics>

</fdm_config>
